// COMSOL Multiphysics 6.1.0.252 model "model_R0_1.00e-04_h_2.00e-08_j0_2.00e+03_LR_15_WR_10_English_Clean.mph"
// English-language supplementary model for the representative simulation case. Stored solution values are preserved; obsolete parameters not referenced by the active model have been removed.
// Outline of the model tree

Parameters
  T0 = 25[degC]  // Temperature
  V_therm = R_const*T0/F_const  // Thermal voltage
  DA = 1.96e-9[m^2/s]  // Diffusion coefficient, cation
  DX = 5.270e-9[m^2/s]  // Diffusion coefficient, anion
  DG = 4.50e-9[m^2/s]  // Diffusion coefficient, neutral species
  cA_bulk = 0.1[mol/L]  // Bulk cation concentration
  cX_bulk = cA_bulk  // Bulk anion concentration
  cG_bulk = 0.8[mol/m^3]  // Bulk concentration, neutral species
  zA = +1  // Cation charge
  zX = -1  // Anion charge
  zG = 0  // Charge number, neutral species
  Istr_bulk = 0.5*((zA^2+zX^2)*cA_bulk)  // Bulk ionic strength
  eps_H2O = 78.5  // Relative permittivity of water
  rb = 1000[nm]  // Geometric radius used in the active-area correction
  cont = pi/4  // Contact angle used in the active-area correction
  i_s = i_s_ave/A_ratio  // Local current density
  vreact = i_s/F_const  // Molar reaction flux
  i_s_ave = 2.000000000e+03[A/m^2]  // Area-averaged current density
  A_ratio = ((10^5)^2-((rb/1[nm])*sin(cont))^2)/(10^5)^2  // Electrochemically active area ratio
  R0 = 1.000000000e-04[m]  // Characteristic geometric length
  h_mat = 2.000000000e-08[m]  // Material-layer thickness

Functions
  extm1: MATLAB "MATLAB Boundary Solver" | funcs = {MatSolver, "ca, cx"}

Geometry
  geom1 "Geometry 1" (2D axisymmetric, length unit m)
    r1: Rectangle "Main Axisymmetric Domain" | size = {10*R0, 15*R0-h_mat}
    pt1: Point "Left Interface Point" | p = {0, R0}
    pt2: Point "Right Interface Point" | p = {10*R0, R0}
    ls1: LineSegment "Horizontal Domain Partition" | vertex1 = pt1(1) points 1; vertex2 = pt2(1) points 1
    ls2: LineSegment "Electrode Surface Partition" | specify1 = coord; specify2 = coord; coord2 = {R0, 0}
    ls3: LineSegment "Vertical Domain Partition"
      specify1 = coord
      coord1 = {2.5 * R0, 0}
      specify2 = coord
      coord2 = {2.5 * R0, R0}
    fin: Finalize "Form Union"

Materials
  mat1: Common "Water" on all domains
    def "Basic"
      thermalexpansioncoefficient = alpha_p(T)
      bulkviscosity = muB(T)
      dynamicviscosity = eta(T)
      ratioofspecificheat = gamma_w(T)
      electricconductivity = 5.5e-6[S/m]
      heatcapacity = Cp(T)
      density = rho(T)
      thermalconductivity = k(T)
      soundspeed = cs(T)
      eta: Piecewise "分段"
        arg = T
        pieces = 
          {273.15, 413.15, 1.3799566804-0.021224019151*T^1+1.3604562827E-4*T^2-4.6454090319E-7*T^3+8.9042735735E-10*T^4-9.0790692686E-13*T^5+3.8457331488E-16*T^6}
          {413.15, 553.75, 0.00401235783-2.10746715E-5*T^1+3.85772275E-8*T^2-2.39730284E-11*T^3}
        argunit = K
        fununit = Pa*s
      Cp: Piecewise "分段 2" | arg = T; pieces = {273.15, 553.75, 12010.1471-80.4072879*T^1+0.309866854*T^2-5.38186884E-4*T^3+3.62536437E-7*T^4}; argunit = K; fununit = J/(kg*K)
      rho: Piecewise "分段 3"
        arg = T
        smooth = contd1
        pieces = 
          {273.15, 293.15, 6.3092789034e-05*T^3-0.0603676398829*T^2+18.9229382407066*T-950.704055329848}
          {293.15, 373.15, 1.0335053319e-05*T^3-0.0133950656345*T^2+4.96928883266*T+432.257114008512}
        argunit = K
        fununit = kg/m^3
      k: Piecewise "分段 4" | arg = T; pieces = {273.15, 553.75, -0.869083936+0.00894880345*T^1-1.58366345E-5*T^2+7.97543259E-9*T^3}; argunit = K; fununit = W/(m*K)
      cs: Interpolation "插值" | table = {{273, 1403}, {278, 1427}, {283, 1447}, {293, 1481}, {303, 1507}, {313, 1526}, {323, 1541}, {333, 1552}, {343, 1555}, {353, 1555}, {363, 1550}, {373, 1543}}; interp = piecewisecubic; fununit = m/s; argunit = K
      an1: Analytic | funcname = alpha_p; expr = -1/rho(T)*d(rho(T),T); args = T; fununit = 1/K; argunit = K
      an2: Analytic "解析 2" | funcname = gamma_w; expr = 1+(T/Cp(T))*(alpha_p(T)*cs(T))^2; args = T; fununit = 1; argunit = K
      an3: Analytic "解析 3" | funcname = muB; expr = 2.79*eta(T); args = T; fununit = Pa*s; argunit = K

Physics
  es: Electrostatics on all domains
    dependent variable V
    ccn1: ChargeConservation (default) | epsilonr_mat = userdef; epsilonr = eps_H2O
    axi1: AxialSymmetry (default)
    zc1: ZeroCharge (default)
    init1: init "Initial Values" (default)
    gnd1: Ground on boundaries 5
    df1: DisplacementField "Electric Displacement Field" on boundaries 2
      D0 = {0, 0, MatSolver(ca[1/mol*m^3],cx[1/mol*m^3])}
  tds: DilutedSpecies "Transport of Diluted Species" on all domains
    dependent variable ca = {ca, cx, cg}
    ShapeProperty.order_concentration = 2
    TransportMechanism.Convection = 0
    TransportMechanism.Migration = 1
    sp1: SpeciesProperties "Species Charges" (default) | z = {zA, zX, zG}; minput_temperature = 298.15[K]
    cdm1: ConvectionDiffusionMigration "Transport Properties" (default)
      minput_temperature = 298.15[K]
      D_ca = DA
      D_cx = DX
      D_cg = DG
    axi1: AxialSymmetry (default)
    nflx1: NoFlux (default)
    init1: init "Initial Values" (default) | initc = {cA_bulk, cX_bulk, cG_bulk}
    conc1: Concentration "Bulk Concentration" on boundaries 5 | species = {1, 1, 1}; c0 = {cA_bulk, cX_bulk, cG_bulk}
    fl1: FluxBoundary "Reaction Flux" on boundaries 2 | species = {0, 1, 1}; J0 = {0, vreact, 0.5*vreact}

Multiphysics
  pc1: PotentialCoupling on all domains | PotentialSource_physics = es; PotentialDestination_physics = tds
  scdc1: SpaceChargeDensityCoupling on all domains
    SpaceChargeDensitySource_physics = tds
    SpaceChargeDensityDestination_physics = es

Mesh
  mesh1 "Mesh 1"
    size: MeshSizeDefault "Global Mesh Size" | hmax = 1.0E-4; hmin = 4.5E-7; hcurve = 0.3; hgrad = 1.3
    ftri1: FreeTri "Free Triangular Mesh" on remaining entities
      size1: Size "Electrode Boundary Size" on boundaries 2 | hmax = 25e-9; custom = on
      size2: Size "Lower Domain Size" on domains 1 | hmax = R0/10; hmin = 1e-8; hgrad = 1.25; custom = on

Studies
  std1 "Stationary Study"
    stat: Stationary

Solver configurations
  sol1 "Stationary Solution" (study std1)
    v1: Variables "Dependent Variables 1.1"
    s1: Stationary "Stationary Solver 1.1"
      fc1: FullyCoupled | linsolver = d1; initstep = 0.01; minstep = 1.0E-6; maxiter = 50
      d1: Direct "Direct (merged)"

Datasets
  dset1: Solution "Stationary Solution Dataset" | solution = sol1
  rev1: Revolve2D "Revolved 2D Dataset" | data = dset1; startangle = -90; revangle = 225

Plots
  pg1: PlotGroup2D "Electric Potential (es)" | data = dset1
    surf1: Surface | expr = V
    str1: Streamline "Streamlines" on boundaries 1-8 | expr = {es.Er, es.Ez}; udist = 0.02
      col1: Color "Color Expression" | expr = V
      filt1: Filter | expr = !isScalingSystemDomain
  pg2: PlotGroup3D "Electric Potential, Revolved Geometry (es)" | data = rev1
    vol1: Volume | expr = V
  pg3: PlotGroup2D "Electric Field Norm (es)" | data = dset1
    surf1: Surface | expr = es.normE
    str1: Streamline "Streamlines" on boundaries 1-8 | expr = {es.Er, es.Ez}; udist = 0.02
      col1: Color "Color Expression" | expr = es.normE
      filt1: Filter | expr = !isScalingSystemDomain
  pg4: PlotGroup2D "Concentration, a (tds)" | data = dset1; prefixintitle = Species a:
    surf1: Surface | expr = ca
    str1: Streamline "Streamlines"
      expr = {tds.tflux_car, tds.tflux_caz}
      descr = Total flux
      pointtype = arrow
      arrowlength = logarithmic
  pg5: PlotGroup3D "Concentration, a, 3D (tds)" | data = rev1; prefixintitle = Species a:; typeintitle = off
    surf1: Surface | expr = ca
  pg6: PlotGroup2D "Concentration, x (tds)" | data = dset1; prefixintitle = Species x:
    surf1: Surface | expr = cx
    str1: Streamline "Streamlines"
      expr = {tds.tflux_cxr, tds.tflux_cxz}
      descr = Total flux
      pointtype = arrow
      arrowcount = 72
      arrowlength = logarithmic
      arrowscale = 0.065831907021
  pg7: PlotGroup3D "Concentration, x, 3D (tds)" | data = rev1; prefixintitle = Species x:; typeintitle = off
    surf1: Surface | expr = cx
  pg8: PlotGroup2D "Concentration, g (tds)" | data = dset1; prefixintitle = Species g:
    surf1: Surface | expr = cg
    str1: Streamline "Streamlines"
      expr = {tds.tflux_cgr, tds.tflux_cgz}
      descr = Total flux
      pointtype = arrow
      arrowlength = logarithmic
  pg9: PlotGroup3D "Concentration, g, 3D (tds)" | data = rev1; prefixintitle = Species g:; typeintitle = off
    surf1: Surface | expr = cg